A := [3.78530028054; -1.13087919322; 2.28347401347]
B := [-1.52561816349; 3.66929595141; -3.17238893638]
_C := [2.17029014132; 1.78573678672; -1.50776834036]
_D := [-2.60373990933; 1.30458888286; 0.606803870741]  # Geogebra: CD
_C := [6.31300156421; -2.09141946279; 2.94241724235]
_D := [3.84483986564; -2.27352168287; 3.93810555146]  # Geogebra: ML
_C := [-2.90273843497; 0.184430675653; 2.33445594161]
_D := [-4.96317977788; 1.09486015702; 1.61080221314]  # Geogebra: NO
_C := [-8.32113923862; 2.43620717578; 7.63435507737]
_D := [4.88336533678; -2; -2.32934150422]  # Geogebra: PQ
_C := [-1.28680701104; 4.85226280381; -2.3640582345]
_D := [-1.91768305417; 1.72717656163; -4.49945463252]  # Geogebra: RS
C := [-0.760530823391; 2.97778594761; -2.38642098823]
D := [-2.32867450979; 4.39512353733; -3.99736213312]  # Geogebra: TU
AB := B - A → [-5.31091844403; 4.80017514463; -5.45586294984]
AC := C - A → [-4.54583110393; 4.10866514083; -4.6698950017]
CD := D - C → [-1.5681436864; 1.41733758972; -1.61094114489]
# Близко к нулю? Значит оба отрезка лежат в одной плоскости.
CD*(AB×AC) → -(0.240071152082*10^-22)
# Trivial reject 0: лежат не в одной плоскости
round(CD*(AB×AC), 10) ≠ 0 → 0
# Базис пространства плоскости
u := AB/|AB| → [-0.590051144449; 0.533306784409; -0.606154700253]
v := AB×AC/|AB×AC| → [0.680463702925; -0.0755707434218; -0.728874620041]
n := u×v/|u×v| → [-0.434521341178; -0.842539575594; -0.318305305671]
# Матрица перехода в пространство плоскости
M_plane := [u[0], u[1], u[2]; v[0], v[1], v[2]; n[0], n[1], n[2]] → [
    -0.590051144449, 0.533306784409, -0.606154700253;
    0.680463702925, -0.0755707434218, -0.728874620041;
    -0.434521341178, -0.842539575594, -0.318305305671
]
# Точки в пространстве плоскости
A' := M_plane*(A - A) → [0.0; 0.0; 0.0]
B' := M_plane*(B - A) → [9.00077644794; -(0.307094314009*10^-10); -(0.151053349973*10^-19)]
C' := M_plane*(C - A) → [7.70413064478; -(0.262854513616*10^-10); -(0.288465717478*10^-12)]
D' := M_plane*(D - A) → [10.3617709208; -(0.355317052374*10^-10); -(0.207512311614*10^-12)]
# Trivial reject 1: второй отрезок лежит на первом, а значит и на оси X. При этом он может полностью лежать внутри первого отрезка, так и частично или полностью перекрывать его.
(round(C'[2], 5) == 0) and (round(D'[2], 5) == 0) = 1
# Trivial reject 2: поскольку первый отрезок в пространстве плоскости всегда вдоль оси X, то если обе точки второго отрезка лежат по Z строго выше или ниже первого отрезка, то пересечения нет. При этом отрезки могут быть параллельны.
((C'[2] > 0) and (D'[2] > 0)) or ((C'[2] < 0) and (D'[2] < 0)) → 1  # Проверять через epsilon
# Trivial reject 3: точки второго отрезка лежат по разные стороны оси Z. При этом они могут быть по X полностью слева от первой точки первого отрезка или справа от второй точки первого отрезка
((C'[0] < A'[0]) and (D'[0] < A'[0])) or ((C'[0] > B'[0]) and (D'[0] > B'[0])) → 0  # Проверять через epsilon
# Ищем пересечение
# Выражаем второй отрезок параметрически и раскладываем по компонентам
C'D' := D' - C' → [2.65764027602; -(0.924625387583*10^-11); 0.809534058636*10^-13]
f(t) := C' + C'D'*t
f(0) == C' → 1
round(f(1), 15) == round(D', 15) → 1
C'[0] + C'D'[0]*t
C'[1] + C'D'[1]*t
C'[2] + C'D'[2]*t
t := C'[2] + C'D'[2]*t == 0 solve, t → 3.56335492498  # При таком t Z будет нулевым
IntersecPoint' := C' + C'D'*t → [17.1742462111; -(0.592331356477*10^-10); 0.681950305454*10^-39]  # Искомая точка пересечения в пространстве плоскости
(IntersecPoint'[0] ≥ A'[0]) and (IntersecPoint'[0] ≤ B'[0]) → 0
# Проверяем, что точка пересечения лежит в пределах первого отрезка. Note: Проверять через epsilon.
# Возвращаем точку пересечения обратно в мировое пространство
M_plane' := transpose(M_plane) → [
    -0.590051144449, 0.680463702925, -0.434521341178;
    0.533306784409, -0.0755707434218, -0.842539575594;
    -0.606154700253, -0.728874620041, -0.318305305671
]
IntersecPoint' := A + M_plane'*IntersecPoint' → [-6.34838335143; 8.02826282829; -8.12677605068]
