A := [3; 1.29994749397; 5]
B := [0.619038585016; 2.28001194423; 2.52223426431]
_C := [3.84782961469; 1.73694868249; 1.24410048894]
_D := [1.68507450179; 2.04795019946; 2.41158558513]  # Geogebra: CD
_C := [3.92234126745; 1.0521048776; 5.18197915461]
_D := [3.20159063166; 1.04975251706; 6.19653948061]  # Geogebra: : WZ
_C := [0.898341053487; 2.37460877172; 1.57623010072]
_D := [-0.522693653298; 2.57072719361; 2.3918585245]  # Geogebra: : A1B1
_C := [1.06898080809; 2.09480424842; 2.9904700855]
_D := [0.0728166365939; 2.50485083084; 1.95380420939]  # Geogebra: : H1I1
_C := [2.05649967708; 1.8360188499; 3.14653210054]
_D := [0.815676112067; 2.01374595382; 3.8204871609]  # Geogebra: : J1K1
_C := [1.79411752596; 1.95566477948; 2.80477715045]
_D := [-0.512571958419; 2.53029268706; 2.61641365329]  # Geogebra: : LM
_C := [2.02200749605; 1.70251415453; 3.98224460892]
_D := [2.85830427054; 1.55815726386; 3.6730073137]  # Geogebra: : ST
C := [1.86102245071; 1.76877970548; 3.81471428828]
D := [1.17493004257; 1.77785616411; 4.71371311115]  # Geogebra: : QR
_C := [0.439730245631; 2.20826497732; 3.19456892038]
_D := [0.501692580777; 2.39591184355; 2.00121910112]  # Geogebra: : PO
_C := [1.77401132098; 1.38317490522; 6.21101035654]
_D := [3.50360687071; 1.26575966104; 4.50254586646]  # Geogebra: : O1N1
AB := B - A → [-2.38096141498; 0.980064450264; -2.47776573569]
AC := C - A → [-1.13897754929; 0.46883221151; -1.18528571172]
CD := D - C → [-0.686092408145; 0.009076458629; 0.898998822878]
CD*(AB×AC) → -(0.171883714106*10^-11)  # Близко к нулю? Значит оба отрезка лежат в одной плоскости.
# Базис пространства плоскости
u := AB/|AB| → [-0.666310814832; 0.274270527163; -0.693401453682]
v := AB×AC/|AB×AC| → [0.725820321034; 0.451705343491; -0.518793932343]
n := u×v/|u×v| → [0.1709232565; -0.848962873506; -0.500047277561]
# Матрица перехода в пространство плоскости
M_plane := [u[0], u[1], u[2]; v[0], v[1], v[2]; n[0], n[1], n[2]] → [
    -0.666310814832, 0.274270527163, -0.693401453682;
    0.725820321034, 0.451705343491, -0.518793932343;
    0.1709232565, -0.848962873506, -0.500047277561
]
# Точки в пространстве плоскости
A' := M_plane*(A - A) → [0.0; 0.0; 0.0]
B' := M_plane*(B - A) → [3.57334949694; -(0.545766526054*10^-12); -(0.509779133054*10^-20)]
C' := M_plane*(C - A) → [1.70937875228; -(0.261077653933*10^-12); -(0.500914480036*10^-12)]
D' := M_plane*(D - A) → [1.54565185825; -0.960275061569; -0.57451663897]
# Trivial reject 1: второй отрезок лежит на первом, а значит и на оси X. При этом он может полностью лежать внутри первого отрезка, так и частично или полностью перекрывать его.
(round(C'[2], 5) == 0) and (round(D'[2], 5) == 0) = 0
# Trivial reject 2: поскольку первый отрезок в пространстве плоскости всегда вдоль оси X, то если обе точки второго отрезка лежат по Z строго выше или ниже первого отрезка, то пересечения нет. При этом отрезки могут быть параллельны.
((C'[2] > 0) and (D'[2] > 0)) or ((C'[2] < 0) and (D'[2] < 0)) → 1
# Trivial reject 3: точки второго отрезка лежат по разные стороны оси Z. При этом они могут быть по X полностью слева от первой точки первого отрезка или справа от второй точки первого отрезка
((C'[0] < A'[0]) and (D'[0] < A'[0])) or ((C'[0] > B'[0]) and (D'[0] > B'[0])) → 0
# Ищем пересечение
# Выражаем второй отрезок параметрически и раскладываем по компонентам
C'D' := D' - C' → [-0.163726894028; -0.960275061569; -0.57451663897]
f(t) := C' + C'D'*t
f(0) == C' → 1
round(f(1), 15) == round(D', 15) → 1
C'[0] + C'D'[0]*t
C'[1] + C'D'[1]*t
C'[2] + C'D'[2]*t
t := C'[2] + C'D'[2]*t == 0 solve, t → -(0.871888551277*10^-12)  # При таком t Z будет нулевым
IntersecPoint' := C' + C'D'*t → [1.70937875228; 0.576175178325*10^-12; 0.561251143788*10^-38]  # Искомая точка пересечения в пространстве плоскости
(IntersecPoint'[0] ≥ A'[0]) and (IntersecPoint'[0] ≤ B'[0]) → 1  # Проверяем, что точка пересечения лежит в пределах первого отрезка
# Возвращаем точку пересечения обратно в мировое пространство
M_plane' := transpose(M_plane) → [
    -0.666310814832, 0.725820321034, 0.1709232565;
    0.274270527163, 0.451705343491, -0.848962873506;
    -0.693401453682, -0.518793932343, -0.500047277561
]
IntersecPoint' := A + M_plane'*IntersecPoint' → [1.86102245071; 1.76877970548; 3.81471428828]
